# OpenSim document version 30000
ForceSet Rajagopal2015ReserveActuators:
  defaults: CoordinateActuator default: optimal_force=1
  CoordinateActuator reserve_hip_flexion_r: coordinate=hip_flexion_r optimal_force=1
  CoordinateActuator reserve_hip_adduction_r: coordinate=hip_adduction_r optimal_force=1
  CoordinateActuator reserve_hip_rotation_r: coordinate=hip_rotation_r optimal_force=1
  CoordinateActuator reserve_knee_angle_r: coordinate=knee_angle_r optimal_force=1
  CoordinateActuator reserve_ankle_angle_r: coordinate=ankle_angle_r optimal_force=1
  CoordinateActuator reserve_hip_flexion_l: coordinate=hip_flexion_l optimal_force=1
  CoordinateActuator reserve_hip_adduction_l: coordinate=hip_adduction_l optimal_force=1
  CoordinateActuator reserve_hip_rotation_l: coordinate=hip_rotation_l optimal_force=1
  CoordinateActuator reserve_knee_angle_l: coordinate=knee_angle_l optimal_force=1
  CoordinateActuator reserve_ankle_angle_l: coordinate=ankle_angle_l optimal_force=1
