# OpenSim document version 30000
AnalyzeTool @STUDYNAME@_@NAME@_body_kinematics:
  model_file: @MODEL@
  replace_force_set: false
  results_directory: results
  output_precision: 8
  initial_time: @INIT_TIME@
  final_time: @FINAL_TIME@
  solve_for_equilibrium_for_auxiliary_states: false
  maximum_number_of_integrator_steps: 20000
  maximum_integrator_step_size: 1
  minimum_integrator_step_size: 1e-8
  integrator_error_tolerance: 1e-5
  coordinates_file: @COORDINATES_FILE@
  lowpass_cutoff_frequency_for_coordinates: -1
  AnalysisSet Analyses:
    BodyKinematics: start_time=@INIT_TIME@ end_time=@FINAL_TIME@ step_interval=1 in_degrees=true bodies=all
        express_results_in_body_local_frame=false
