# OpenSim document version 30000
ForceSet @STUDYNAME@_@SUBJECTNAME@_residual_actuators:
  PointActuator FX: body=pelvis
      point=(@SYSTEM_COM_GLOBAL_X_MEAS@ @SYSTEM_COM_GLOBAL_Y_MEAS@ @SYSTEM_COM_GLOBAL_Z_MEAS@) point_is_global=false
      direction=(1 0 0) force_is_global=true optimal_force=1.5
  PointActuator FY: body=pelvis
      point=(@SYSTEM_COM_GLOBAL_X_MEAS@ @SYSTEM_COM_GLOBAL_Y_MEAS@ @SYSTEM_COM_GLOBAL_Z_MEAS@) point_is_global=false
      direction=(0 1 0) force_is_global=true optimal_force=1.5
  PointActuator FZ: body=pelvis
      point=(@SYSTEM_COM_GLOBAL_X_MEAS@ @SYSTEM_COM_GLOBAL_Y_MEAS@ @SYSTEM_COM_GLOBAL_Z_MEAS@) point_is_global=false
      direction=(0 0 1) force_is_global=true optimal_force=1.5
  TorqueActuator MX: bodyA=pelvis bodyB=ground torque_is_global=true axis=(1 0 0) optimal_force=1
  TorqueActuator MY: bodyA=pelvis bodyB=ground torque_is_global=true axis=(0 1 0) optimal_force=1
  TorqueActuator MZ: bodyA=pelvis bodyB=ground torque_is_global=true axis=(0 0 1) optimal_force=1
