# OpenSim document version 30000
AnalyzeTool @STUDYNAME@_@NAME@_so:
  model_file: @MODEL@
  replace_force_set: false
  force_set_files: @FORCE_SET_FILES@
  results_directory: results
  output_precision: 8
  initial_time: @INIT_TIME@
  final_time: @FINAL_TIME@
  external_loads_file: external_loads.xml
  coordinates_file: @COORDINATES_FILE@
  lowpass_cutoff_frequency_for_coordinates: 6
  AnalysisSet Analyses:
    StaticOptimization: start_time=-Inf end_time=Inf step_interval=1 in_degrees=true use_model_force_set=true
        activation_exponent=2 use_muscle_physiology=true optimizer_convergence_criterion=0.0001
        optimizer_max_iterations=100
    MuscleAnalysis: start_time=-Inf end_time=Inf step_interval=1 in_degrees=true muscle_list=all
        moment_arm_coordinate_list=(hip_adduction_r hip_flexion_r hip_rotation_r knee_angle_r ankle_angle_r hip_adduction_l hip_flexion_l hip_rotation_l knee_angle_l ankle_angle_l)
        compute_moments=true
